# Расчёт АКБ
Uel_nom := 3.2
Ubat := 320
n := Ubat/Uel_nom = 100
Uel_max := 3.65
Uel_min := 2.9
Uel_min_alarm := 2.5
Ubat_max := Uel_max*n = 365
Ubat_min := Uel_min*n = 290
Ubat_min_alarm := Uel_min_alarm*n = 250
CapNomAh := 50
I_05C_nom := CapNomAh*0.5 = 25  # Номинальный ток заряда/разряда
I_1C := CapNomAh*1 = 50
I_3C_max := CapNomAh*3 = 150  # Максимальный ток заряда/разряда
I_5C_pulse := CapNomAh*5 = 250  # Кратковременный ток заряда/разряда 30с
Uel_dis_5C := 3.0  # Напряжние элемента при интенсивном разряде 5C
PoutMax5C := Uel_dis_5C*n*I_5C_pulse = 75000  # Максимальная пиковая (30 с) мощность батареи
Uel_dis_3C := 3.1
PoutMax3C := Uel_dis_3C*n*I_3C_max = 46500  # Максимальная длительная мощность батареи
Enom_1C := 1/2*(3.25 + 3.05)*CapNomAh*n*2 = 31500  # Втч
Mel := 1.395
Mbat100 := Mel*n = 139.5  # Масса батареи
Mbat200 := Mbat100*2 = 279
