U := 220
C := 4*10^-6
R := 47
i := 0 .. 3
f[i] := 50, 250, 350, 550
Xc[i] := 1/(2*π*f[i]*C)
Xc[i] = [795.775; 159.155; 113.682; 72.3432]
Z[i] := R - 1i*Xc[i]
Z[i] = [47 - 795.775i; 47 - 159.155i; 47 - 113.682i; 47 - 72.3432i]
Z1[i] := sqrt(R^2 + Xc[i]^2)
Z1[i] = [797.161; 165.95; 123.015; 86.2701]
φ[i] := atan(Xc[i]/R)*180/π
φ[i] = [86.6199; 73.5476; 67.5382; 56.989]
Ia[i] := U/Z1[i]*cos(φ[i]*π/180)
cos(φ[i]*π/180) = [0.0589592; 0.283218; 0.382068; 0.5448]
Ia[i] = [0.0162715; 0.375463; 0.683292; 1.38931]
